*Heading
File generated by TexGen v3.13.1
************
*** MESH ***
************
*Node
1,-0.875,-0.64, -0.0167
2,-0.875,-0.64, 0.05553399
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*Element, Type=C3D4
1, 1772, 1647, 1639, 1648
2, 1772, 1648, 1639, 1773
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********************
*** ORIENTATIONS ***
********************
** Orientation vectors
** 1st vector represents the fibre direction
** 2nd vector is an arbitrary vector perpendicular to the first
*Distribution Table, Name=TexGenOrientationVectors
COORD3D,COORD3D
*Distribution, Location=Element, Table=TexGenOrientationVectors, Name=TexGenOrientationVectors, Input=CSIC_PLAIN_WEAVE_RVE_DAMAGE_V2_2.ori
*Orientation, Name=TexGenOrientations, Definition=coordinates
TexGenOrientationVectors
1, 0
********************
*** ELEMENT SETS ***
********************
** TexGen generates a number of element sets:
** All - Contains all elements
** Matrix - Contains all elements belonging to the matrix
** YarnX - Where X represents the yarn index
*ElSet, ElSet=All, Generate
1, 174405, 1
*ElSet, ElSet=Matrix
1, 2, 3, 4, 5, 6
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*ElSet, ElSet=Yarn0
133, 210, 211, 212, 213, 214
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*ElSet, ElSet=Yarn1
151, 152, 2055, 2056, 2057, 2058
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*ElSet, ElSet=Yarn2
191, 460, 461, 462, 463, 464
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*ElSet, ElSet=Yarn3
300, 1879, 1880, 1881, 1882, 1883
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*****************
*** MATERIALS ***
*****************
** ZHANG ET AL. (2022) PAPER-FAITHFUL MATERIAL BLOCK
** Constant elastic/thermal properties, as stated in Sec. 3.2.3.
** Parameters tagged CALIBRATION are absent from the paper.
*Material, Name=SIC_MATRIX_DAMAGE
*Depvar
14,
1, EPM11, Matrix plastic strain 11
2, EPM22, Matrix plastic strain 22
3, EPM33, Matrix plastic strain 33
4, EPM12, Matrix engineering plastic shear 12
5, EPM13, Matrix engineering plastic shear 13
6, EPM23, Matrix engineering plastic shear 23
7, PEEQM, Matrix equivalent plastic strain
8, DMT, Matrix tensile damage
9, DMC, Matrix compressive damage
10, RMT, Matrix tensile damage threshold
11, RMC, Matrix compressive damage threshold
12, MMODE, Matrix branch 1 tension 2 compression
13, TMINIT, Matrix first damage temperature
14, DM, Matrix combined damage plotted as SDV14
*User Material, constants=15
2.0, 350000, 0.2, 310, 310, 100, 120000, 2
2, 1e-06, 0.03, 0.2, 1.0, 0.999, 0.0
*Expansion, zero=1050.
4.5e-06,
**
*Material, Name=CSIC_YARN_DAMAGE
*Depvar
12,
1, DYL, Yarn combined longitudinal damage plotted as SDV1
2, DYT, Yarn combined transverse damage plotted as SDV2
3, DY1T, Yarn longitudinal tensile damage
4, DY1C, Yarn longitudinal compressive damage
5, DY2T, Yarn transverse tensile damage
6, DY2C, Yarn transverse compressive damage
7, RY1T, Yarn longitudinal tensile threshold
8, RY1C, Yarn longitudinal compressive threshold
9, RY2T, Yarn transverse tensile threshold
10, RY2C, Yarn transverse compressive threshold
11, YMODE, Yarn dominant mode
12, TYINIT, Yarn first damage temperature
*User Material, constants=31
1.0, 254967.228, 44321.7376, 44321.7376, 0.247516386, 0.247516386, 0.389940281, 26431.5153
26431.5153, 15876.668, 3968.62033, 2738.12632, 545.37343, 545.37343, 464.384723, 464.384723
136.343358, 2, 2, 2, 2, 50993.4456, 1.5, 0.4
3571.7583, 1e-06, 0.03, 0.2, 1.0, 0.999, 0.0
*Expansion, type=ORTHO, zero=1050.
1.07092596282e-06, 3.95177026516e-06, 3.95177026516e-06
**
*Solid Section, ElSet=Matrix, Material=SIC_MATRIX_DAMAGE
1.0,
*Solid Section, ElSet=Yarn0, Material=CSIC_YARN_DAMAGE, Orientation=TexGenOrientations
1.0,
*Solid Section, ElSet=Yarn1, Material=CSIC_YARN_DAMAGE, Orientation=TexGenOrientations
1.0,
*Solid Section, ElSet=Yarn2, Material=CSIC_YARN_DAMAGE, Orientation=TexGenOrientations
1.0,
*Solid Section, ElSet=Yarn3, Material=CSIC_YARN_DAMAGE, Orientation=TexGenOrientations
1.0,
*****************
*** NODE SETS ***
*****************
** AllNodes - Node set containing all elements
*NSet, NSet=AllNodes, Generate
1, 34049, 1
************************************
*** PERIODIC BOUNDARY CONDITIONS ***
************************************
*** ConstraintsDriver0 = e_x
*** ConstraintsDriver1 = e_y
*** ConstraintsDriver2 = e_z
*** ConstraintsDriver3 = e_xy
*** ConstraintsDriver4 = e_xz
*** ConstraintsDriver5 = e_yz
*Node
34050, 0, 0, 0
*NSet, NSet=ConstraintsDriver0
34050
*Node
34051, 0, 0, 0
*NSet, NSet=ConstraintsDriver1
34051
*Node
34052, 0, 0, 0
*NSet, NSet=ConstraintsDriver2
34052
*Node
34053, 0, 0, 0
*NSet, NSet=ConstraintsDriver3
34053
*Node
34054, 0, 0, 0
*NSet, NSet=ConstraintsDriver4
34054
*Node
34055, 0, 0, 0
*NSet, NSet=ConstraintsDriver5
34055
*NSet, NSet=FaceA, Unsorted
16, 17, 18, 19, 20, 23
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*NSet, NSet=FaceB, Unsorted
2, 3, 4, 5, 6, 9
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*NSet, NSet=FaceC, Unsorted
72, 73, 74, 75, 76, 79
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*NSet, NSet=FaceD, Unsorted
58, 59, 60, 61, 62, 65
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*NSet, NSet=FaceE, Unsorted
150, 156, 164, 170, 178, 184
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*NSet, NSet=FaceF, Unsorted
145, 151, 157, 165, 171, 179
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*NSet, NSet=Edge1, Unsorted
114, 115, 116, 117, 118, 119
*NSet, NSet=Edge2, Unsorted
130, 131, 132, 133, 134, 135
*NSet, NSet=Edge3, Unsorted
138, 139, 140, 141, 142, 143
*NSet, NSet=Edge4, Unsorted
122, 123, 124, 125, 126, 127
*NSet, NSet=Edge5, Unsorted
1, 8, 29, 36, 263, 271
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*NSet, NSet=Edge6, Unsorted
15, 22, 43, 50, 1147, 1155
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*NSet, NSet=Edge7, Unsorted
21, 28, 49, 56, 1154, 1163
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*NSet, NSet=Edge8, Unsorted
7, 14, 35, 42, 270, 279
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*NSet, NSet=Edge9, Unsorted
57, 64, 85, 92, 1302, 1310
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*NSet, NSet=Edge10, Unsorted
71, 78, 99, 106, 927, 935
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*NSet, NSet=Edge11, Unsorted
77, 84, 105, 112, 934, 943
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*NSet, NSet=Edge12, Unsorted
63, 70, 91, 98, 1309, 1318
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*NSet, NSet=MasterNode1, Unsorted
113
*NSet, NSet=MasterNode2, Unsorted
129
*NSet, NSet=MasterNode3, Unsorted
137
*NSet, NSet=MasterNode4, Unsorted
121
*NSet, NSet=MasterNode5, Unsorted
120
*NSet, NSet=MasterNode6, Unsorted
136
*NSet, NSet=MasterNode7, Unsorted
144
*NSet, NSet=MasterNode8, Unsorted
128
***************************
*** BOUNDARY CONDITIONS ***
***************************
*** Name: Translation stop Vertex 1 Type: Displacement/Rotation
*Boundary
MasterNode1, 1, 1
MasterNode1, 2, 2
MasterNode1, 3, 3

*****************
*** EQUATIONS ***
*****************
*Equation
3
FaceA, 1, 1.0, FaceB, 1, -1.0, ConstraintsDriver0, 1, -3.5
*Equation
2
FaceA, 2, 1.0, FaceB, 2, -1.0
*Equation
2
FaceA, 3, 1.0, FaceB, 3, -1.0
*Equation
3
FaceC, 1, 1.0, FaceD, 1, -1.0, ConstraintsDriver3, 1, -3.5
*Equation
3
FaceC, 2, 1.0, FaceD, 2, -1.0, ConstraintsDriver1, 1, -3.5
*Equation
2
FaceC, 3, 1.0, FaceD, 3, -1.0
*Equation
3
FaceE, 1, 1.0, FaceF, 1, -1.0, ConstraintsDriver4, 1, -0.4334
*Equation
3
FaceE, 2, 1.0, FaceF, 2, -1.0, ConstraintsDriver5, 1, -0.4334
*Equation
3
FaceE, 3, 1.0, FaceF, 3, -1.0, ConstraintsDriver2, 1, -0.4334
*Equation
3
Edge2, 1, 1.0, Edge1, 1, -1.0, ConstraintsDriver0, 1, -3.5
*Equation
2
Edge2, 2, 1.0, Edge1, 2, -1.0
*Equation
2
Edge2, 3, 1.0, Edge1, 3, -1.0
*Equation
4
Edge3, 1, 1.0, Edge1, 1, -1.0, ConstraintsDriver0, 1, -3.5, ConstraintsDriver3, 1, -3.5
*Equation
3
Edge3, 2, 1.0, Edge1, 2, -1.0, ConstraintsDriver1, 1, -3.5
*Equation
2
Edge3, 3, 1.0, Edge1, 3, -1.0
*Equation
3
Edge4, 1, 1.0, Edge1, 1, -1.0, ConstraintsDriver3, 1, -3.5
*Equation
3
Edge4, 2, 1.0, Edge1, 2, -1.0, ConstraintsDriver1, 1, -3.5
*Equation
2
Edge4, 3, 1.0, Edge1, 3, -1.0
*Equation
3
Edge6, 1, 1.0, Edge5, 1, -1.0, ConstraintsDriver0, 1, -3.5
*Equation
2
Edge6, 2, 1.0, Edge5, 2, -1.0
*Equation
2
Edge6, 3, 1.0, Edge5, 3, -1.0
*Equation
4
Edge7, 1, 1.0, Edge5, 1, -1.0, ConstraintsDriver4, 1, -0.4334, ConstraintsDriver0, 1, -3.5
*Equation
3
Edge7, 2, 1.0, Edge5, 2, -1.0, ConstraintsDriver5, 1, -0.4334
*Equation
3
Edge7, 3, 1.0, Edge5, 3, -1.0, ConstraintsDriver2, 1, -0.4334
*Equation
3
Edge8, 1, 1.0, Edge5, 1, -1.0, ConstraintsDriver4, 1, -0.4334
*Equation
3
Edge8, 2, 1.0, Edge5, 2, -1.0, ConstraintsDriver5, 1, -0.4334
*Equation
3
Edge8, 3, 1.0, Edge5, 3, -1.0, ConstraintsDriver2, 1, -0.4334
*Equation
3
Edge10, 1, 1.0, Edge9, 1, -1.0, ConstraintsDriver3, 1, -3.5
*Equation
3
Edge10, 2, 1.0, Edge9, 2, -1.0, ConstraintsDriver1, 1, -3.5
*Equation
2
Edge10, 3, 1.0, Edge9, 3, -1.0
*Equation
4
Edge11, 1, 1.0, Edge9, 1, -1.0, ConstraintsDriver3, 1, -3.5, ConstraintsDriver4, 1, -0.4334
*Equation
4
Edge11, 2, 1.0, Edge9, 2, -1.0, ConstraintsDriver1, 1, -3.5, ConstraintsDriver5, 1, -0.4334
*Equation
3
Edge11, 3, 1.0, Edge9, 3, -1.0, ConstraintsDriver2, 1, -0.4334
*Equation
3
Edge12, 1, 1.0, Edge9, 1, -1.0, ConstraintsDriver4, 1, -0.4334
*Equation
3
Edge12, 2, 1.0, Edge9, 2, -1.0, ConstraintsDriver5, 1, -0.4334
*Equation
3
Edge12, 3, 1.0, Edge9, 3, -1.0, ConstraintsDriver2, 1, -0.4334
*Equation
3
MasterNode2, 1, 1.0, MasterNode1, 1, -1.0, ConstraintsDriver0, 1, -3.5
*Equation
2
MasterNode2, 2, 1.0, MasterNode1, 2, -1.0
*Equation
2
MasterNode2, 3, 1.0, MasterNode1, 3, -1.0
*Equation
4
MasterNode3, 1, 1.0, MasterNode1, 1, -1.0, ConstraintsDriver0, 1, -3.5, ConstraintsDriver3, 1, -3.5
*Equation
3
MasterNode3, 2, 1.0, MasterNode1, 2, -1.0, ConstraintsDriver1, 1, -3.5
*Equation
2
MasterNode3, 3, 1.0, MasterNode1, 3, -1.0
*Equation
3
MasterNode4, 1, 1.0, MasterNode1, 1, -1.0, ConstraintsDriver3, 1, -3.5
*Equation
3
MasterNode4, 2, 1.0, MasterNode1, 2, -1.0, ConstraintsDriver1, 1, -3.5
*Equation
2
MasterNode4, 3, 1.0, MasterNode1, 3, -1.0
*Equation
3
MasterNode5, 1, 1.0, MasterNode1, 1, -1.0, ConstraintsDriver4, 1, -0.4334
*Equation
3
MasterNode5, 2, 1.0, MasterNode1, 2, -1.0, ConstraintsDriver5, 1, -0.4334
*Equation
3
MasterNode5, 3, 1.0, MasterNode1, 3, -1.0, ConstraintsDriver2, 1, -0.4334
*Equation
4
MasterNode6, 1, 1.0, MasterNode1, 1, -1.0, ConstraintsDriver4, 1, -0.4334, ConstraintsDriver0, 1, -3.5
*Equation
3
MasterNode6, 2, 1.0, MasterNode1, 2, -1.0, ConstraintsDriver5, 1, -0.4334
*Equation
3
MasterNode6, 3, 1.0, MasterNode1, 3, -1.0, ConstraintsDriver2, 1, -0.4334
*Equation
5
MasterNode7, 1, 1.0, MasterNode1, 1, -1.0, ConstraintsDriver0, 1, -3.5, ConstraintsDriver4, 1, -0.4334,
ConstraintsDriver3, 1, -3.5
*Equation
4
MasterNode7, 2, 1.0, MasterNode1, 2, -1.0, ConstraintsDriver1, 1, -3.5, ConstraintsDriver5, 1, -0.4334
*Equation
3
MasterNode7, 3, 1.0, MasterNode1, 3, -1.0, ConstraintsDriver2, 1, -0.4334
*Equation
4
MasterNode8, 1, 1.0, MasterNode1, 1, -1.0, ConstraintsDriver3, 1, -3.5, ConstraintsDriver4, 1, -0.4334
*Equation
4
MasterNode8, 2, 1.0, MasterNode1, 2, -1.0, ConstraintsDriver1, 1, -3.5, ConstraintsDriver5, 1, -0.4334
*Equation
3
MasterNode8, 3, 1.0, MasterNode1, 3, -1.0, ConstraintsDriver2, 1, -0.4334
*******************
*******************
*** ZHANG 2022 ANALYSIS: 1000 degC CASE ***
*******************
*Time Points, name=TP_COOL
0.04868549172, 0.09737098345, 0.1460564752, 0.170399221, 0.1947419669, 0.1996105161, 0.2434274586, 0.2921129503, 0.3407984421, 0.3894839338, 0.4381694255, 0.4868549172, 0.5063291139, 0.535540409, 0.6329113924, 0.7302823759, 0.7789678676, 0.8276533593, 0.9250243427, 1
*Time Points, name=TP_HEAT
0.02763561924, 0.1044012282, 0.1811668373, 0.2323439099, 0.2835209826, 0.3602865916, 0.4370522006, 0.4882292733, 0.616171955, 0.7441146366, 0.8720573183, 1
*Time Points, name=TP_TENSION
0.01666666667, 0.03333333333, 0.05, 0.06666666667, 0.08333333333, 0.1, 0.1166666667, 0.1333333333
0.15, 0.1666666667, 0.1833333333, 0.2, 0.2166666667, 0.2333333333, 0.25, 0.2666666667
0.2833333333, 0.3, 0.3166666667, 0.3333333333, 0.35, 0.3666666667, 0.3833333333, 0.4
0.4166666667, 0.4333333333, 0.45, 0.4666666667, 0.4833333333, 0.5, 0.5166666667, 0.5333333333
0.55, 0.5666666667, 0.5833333333, 0.6, 0.6166666667, 0.6333333333, 0.65, 0.6666666667
0.6833333333, 0.7, 0.7166666667, 0.7333333333, 0.75, 0.7666666667, 0.7833333333, 0.8
0.8166666667, 0.8333333333, 0.85, 0.8666666667, 0.8833333333, 0.9, 0.9166666667, 0.9333333333
0.95, 0.9666666667, 0.9833333333, 1
*Initial Conditions, type=TEMPERATURE
AllNodes, 1050.
*Step, Name=COOL_1050_TO_23, nlgeom=NO, inc=20000
Manufacturing cooling with free macroscopic contraction
*Static
0.001, 1.0, 1.0E-12, 0.0025
*Controls, parameters=time incrementation
8, 10, , 30, , , , 20, , ,
*Controls, parameters=field, field=displacement
, 0.08
*Controls, parameters=line search
5
*Temperature
AllNodes, 23.
*Output, field, time points=TP_COOL
*Element Output, directions=YES
S, PEEQ, IVOL, SDV
*Node Output
U, RF, NT
*Output, history, frequency=1
*Node Output, nset=ConstraintsDriver0
U, V, RF
*Node Output, nset=ConstraintsDriver1
U, V, RF
*Node Output, nset=ConstraintsDriver2
U, V, RF
*Node Output, nset=ConstraintsDriver3
U, V, RF
*Node Output, nset=ConstraintsDriver4
U, V, RF
*Node Output, nset=ConstraintsDriver5
U, V, RF
*Restart, write, number interval=20, time marks=NO
*End Step
*Step, Name=HEAT_23_TO_1000, nlgeom=NO, inc=20000
Free heating before isothermal tensile loading
*Static
0.001, 1.0, 1.0E-12, 0.0025
*Controls, parameters=line search
5
*Temperature
AllNodes, 1000.
*Output, field, time points=TP_HEAT
*Element Output, directions=YES
S, PEEQ, IVOL, SDV
*Node Output
U, RF, NT
*Output, history, frequency=1
*Node Output, nset=ConstraintsDriver0
U, V, RF
*Node Output, nset=ConstraintsDriver1
U, V, RF
*Node Output, nset=ConstraintsDriver2
U, V, RF
*Node Output, nset=ConstraintsDriver3
U, V, RF
*Node Output, nset=ConstraintsDriver4
U, V, RF
*Node Output, nset=ConstraintsDriver5
U, V, RF
*End Step
*Step, Name=TENSION_1000C, nlgeom=NO, inc=30000
Isothermal x-direction tensile loading from heated state
*Static
1.0E-4, 1.0, 1.0E-12, 0.002
*Controls, parameters=line search
5
** Velocity-type BC adds strain from the current thermal state.
*Boundary, type=VELOCITY
ConstraintsDriver0, 1, 1, 0.0045
ConstraintsDriver3, 1, 1, 0.0
ConstraintsDriver4, 1, 1, 0.0
ConstraintsDriver5, 1, 1, 0.0
*Temperature
AllNodes, 1000.
*Output, field, time points=TP_TENSION
*Element Output, directions=YES
S, PEEQ, IVOL, SDV
*Node Output
U, RF, NT
*Output, history, frequency=1
*Node Output, nset=ConstraintsDriver0
U, V, RF
*Node Output, nset=ConstraintsDriver1
U, V, RF
*Node Output, nset=ConstraintsDriver2
U, V, RF
*Node Output, nset=ConstraintsDriver3
U, V, RF
*Node Output, nset=ConstraintsDriver4
U, V, RF
*Node Output, nset=ConstraintsDriver5
U, V, RF
*End Step
