*Heading
 ZHANG2022 C/SiC RVE - RT23 - model V2 (assembled by assemble_inp.py)
*Node
1, -0.875, -0.64, -0.02
2, -0.875, -0.64, 0.200002
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*Element, Type=C3D4
1, 594, 521, 517, 595
2, 595, 521, 517, 522
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********************
*** ORIENTATIONS ***
********************
** Orientation vectors
** 1st vector represents the fibre direction
** 2nd vector is an arbitrary vector perpendicular to the first
*Distribution Table, Name=TexGenOrientationVectors
COORD3D,COORD3D
*Distribution, Location=Element, Table=TexGenOrientationVectors, Name=TexGenOrientationVectors
, 1.0, 0.0, 0.0,   0.0, 1.0, 0.0
1, 1.0, 0.0, 0.0,   0.0, 1.0, 0.0
2, 1.0, 0.0, 0.0,   0.0, 1.0, 0.0
3, 1.0, 0.0, 0.0,   0.0, 1.0, 0.0
4, 1.0, 0.0, 0.0,   0.0, 1.0, 0.0
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26452, 1.0, 0.0, 0.0,   0.0, 1.0, 0.0
*Orientation, Name=TexGenOrientations, Definition=coordinates
TexGenOrientationVectors
1, 0
********************
*** ELEMENT SETS ***
********************
** TexGen generates a number of element sets:
** All - Contains all elements
** Matrix - Contains all elements belonging to the matrix
** YarnX - Where X represents the yarn index
*ElSet, ElSet=All, Generate
1, 26452, 1
*ElSet, ElSet=Matrix
1, 2, 3, 4, 5, 6
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*ElSet, ElSet=Yarn0
34, 35, 36, 63, 64, 65
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*ElSet, ElSet=Yarn1
352, 353, 354, 396, 421, 422
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*ElSet, ElSet=Yarn2
91, 92, 93, 155, 156, 157
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*ElSet, ElSet=Yarn3
130, 451, 452, 453, 454, 455
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*****************
*** MATERIALS ***
*****************
*NSet, NSet=AllNodes, Generate
1, 5680, 1
************************************
*** PERIODIC BOUNDARY CONDITIONS ***
************************************
*** ConstraintsDriver0 = e_x
*** ConstraintsDriver1 = e_y
*** ConstraintsDriver2 = e_z
*** ConstraintsDriver3 = e_xy
*** ConstraintsDriver4 = e_xz
*** ConstraintsDriver5 = e_yz
*Node
5681, 0, 0, 0
*NSet, NSet=ConstraintsDriver0
5681
*Node
5682, 0, 0, 0
*NSet, NSet=ConstraintsDriver1
5682
*Node
5683, 0, 0, 0
*NSet, NSet=ConstraintsDriver2
5683
*Node
5684, 0, 0, 0
*NSet, NSet=ConstraintsDriver3
5684
*Node
5685, 0, 0, 0
*NSet, NSet=ConstraintsDriver4
5685
*Node
5686, 0, 0, 0
*NSet, NSet=ConstraintsDriver5
5686
*NSet, NSet=FaceA, Unsorted
10, 13, 14, 15, 24, 27
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*NSet, NSet=FaceB, Unsorted
2, 5, 6, 7, 18, 21
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*NSet, NSet=FaceC, Unsorted
36, 39, 48, 51, 324, 325
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*NSet, NSet=FaceD, Unsorted
30, 33, 42, 45, 426, 427
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*NSet, NSet=FaceE, Unsorted
76, 80, 84, 88, 92, 96
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*NSet, NSet=FaceF, Unsorted
73, 77, 81, 85, 89, 93
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*NSet, NSet=Edge1, Unsorted
54, 55, 56
*NSet, NSet=Edge2, Unsorted
64, 65, 66
*NSet, NSet=Edge3, Unsorted
69, 70, 71
*NSet, NSet=Edge4, Unsorted
59, 60, 61
*NSet, NSet=Edge5, Unsorted
1, 4, 17, 20, 137, 141
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*NSet, NSet=Edge6, Unsorted
9, 12, 23, 26, 383, 387
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*NSet, NSet=Edge7, Unsorted
11, 16, 25, 28, 386, 390
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*NSet, NSet=Edge8, Unsorted
3, 8, 19, 22, 140, 144
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*NSet, NSet=Edge9, Unsorted
29, 32, 41, 44, 425, 429
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*NSet, NSet=Edge10, Unsorted
35, 38, 47, 50, 323, 285
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*NSet, NSet=Edge11, Unsorted
37, 40, 49, 52, 326, 288
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*NSet, NSet=Edge12, Unsorted
31, 34, 43, 46, 428, 432
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*NSet, NSet=MasterNode1, Unsorted
53
*NSet, NSet=MasterNode2, Unsorted
63
*NSet, NSet=MasterNode3, Unsorted
68
*NSet, NSet=MasterNode4, Unsorted
58
*NSet, NSet=MasterNode5, Unsorted
57
*NSet, NSet=MasterNode6, Unsorted
67
*NSet, NSet=MasterNode7, Unsorted
72
*NSet, NSet=MasterNode8, Unsorted
62
***************************
*** BOUNDARY CONDITIONS ***
***************************
*** Name: Translation stop Vertex 1 Type: Displacement/Rotation
*Boundary
MasterNode1, 1, 1
MasterNode1, 2, 2
MasterNode1, 3, 3

*****************
*** EQUATIONS ***
*****************
*Equation
3
FaceA, 1, 1.0, FaceB, 1, -1.0, ConstraintsDriver0, 1, -3.5
*Equation
2
FaceA, 2, 1.0, FaceB, 2, -1.0
*Equation
2
FaceA, 3, 1.0, FaceB, 3, -1.0
*Equation
3
FaceC, 1, 1.0, FaceD, 1, -1.0, ConstraintsDriver3, 1, -3.5
*Equation
3
FaceC, 2, 1.0, FaceD, 2, -1.0, ConstraintsDriver1, 1, -3.5
*Equation
2
FaceC, 3, 1.0, FaceD, 3, -1.0
*Equation
3
FaceE, 1, 1.0, FaceF, 1, -1.0, ConstraintsDriver4, 1, -0.44
*Equation
3
FaceE, 2, 1.0, FaceF, 2, -1.0, ConstraintsDriver5, 1, -0.44
*Equation
3
FaceE, 3, 1.0, FaceF, 3, -1.0, ConstraintsDriver2, 1, -0.44
*Equation
3
Edge2, 1, 1.0, Edge1, 1, -1.0, ConstraintsDriver0, 1, -3.5
*Equation
2
Edge2, 2, 1.0, Edge1, 2, -1.0
*Equation
2
Edge2, 3, 1.0, Edge1, 3, -1.0
*Equation
4
Edge3, 1, 1.0, Edge1, 1, -1.0, ConstraintsDriver0, 1, -3.5, ConstraintsDriver3, 1, -3.5
*Equation
3
Edge3, 2, 1.0, Edge1, 2, -1.0, ConstraintsDriver1, 1, -3.5
*Equation
2
Edge3, 3, 1.0, Edge1, 3, -1.0
*Equation
3
Edge4, 1, 1.0, Edge1, 1, -1.0, ConstraintsDriver3, 1, -3.5
*Equation
3
Edge4, 2, 1.0, Edge1, 2, -1.0, ConstraintsDriver1, 1, -3.5
*Equation
2
Edge4, 3, 1.0, Edge1, 3, -1.0
*Equation
3
Edge6, 1, 1.0, Edge5, 1, -1.0, ConstraintsDriver0, 1, -3.5
*Equation
2
Edge6, 2, 1.0, Edge5, 2, -1.0
*Equation
2
Edge6, 3, 1.0, Edge5, 3, -1.0
*Equation
4
Edge7, 1, 1.0, Edge5, 1, -1.0, ConstraintsDriver4, 1, -0.44, ConstraintsDriver0, 1, -3.5
*Equation
3
Edge7, 2, 1.0, Edge5, 2, -1.0, ConstraintsDriver5, 1, -0.44
*Equation
3
Edge7, 3, 1.0, Edge5, 3, -1.0, ConstraintsDriver2, 1, -0.44
*Equation
3
Edge8, 1, 1.0, Edge5, 1, -1.0, ConstraintsDriver4, 1, -0.44
*Equation
3
Edge8, 2, 1.0, Edge5, 2, -1.0, ConstraintsDriver5, 1, -0.44
*Equation
3
Edge8, 3, 1.0, Edge5, 3, -1.0, ConstraintsDriver2, 1, -0.44
*Equation
3
Edge10, 1, 1.0, Edge9, 1, -1.0, ConstraintsDriver3, 1, -3.5
*Equation
3
Edge10, 2, 1.0, Edge9, 2, -1.0, ConstraintsDriver1, 1, -3.5
*Equation
2
Edge10, 3, 1.0, Edge9, 3, -1.0
*Equation
4
Edge11, 1, 1.0, Edge9, 1, -1.0, ConstraintsDriver3, 1, -3.5, ConstraintsDriver4, 1, -0.44
*Equation
4
Edge11, 2, 1.0, Edge9, 2, -1.0, ConstraintsDriver1, 1, -3.5, ConstraintsDriver5, 1, -0.44
*Equation
3
Edge11, 3, 1.0, Edge9, 3, -1.0, ConstraintsDriver2, 1, -0.44
*Equation
3
Edge12, 1, 1.0, Edge9, 1, -1.0, ConstraintsDriver4, 1, -0.44
*Equation
3
Edge12, 2, 1.0, Edge9, 2, -1.0, ConstraintsDriver5, 1, -0.44
*Equation
3
Edge12, 3, 1.0, Edge9, 3, -1.0, ConstraintsDriver2, 1, -0.44
*Equation
3
MasterNode2, 1, 1.0, MasterNode1, 1, -1.0, ConstraintsDriver0, 1, -3.5
*Equation
2
MasterNode2, 2, 1.0, MasterNode1, 2, -1.0
*Equation
2
MasterNode2, 3, 1.0, MasterNode1, 3, -1.0
*Equation
4
MasterNode3, 1, 1.0, MasterNode1, 1, -1.0, ConstraintsDriver0, 1, -3.5, ConstraintsDriver3, 1, -3.5
*Equation
3
MasterNode3, 2, 1.0, MasterNode1, 2, -1.0, ConstraintsDriver1, 1, -3.5
*Equation
2
MasterNode3, 3, 1.0, MasterNode1, 3, -1.0
*Equation
3
MasterNode4, 1, 1.0, MasterNode1, 1, -1.0, ConstraintsDriver3, 1, -3.5
*Equation
3
MasterNode4, 2, 1.0, MasterNode1, 2, -1.0, ConstraintsDriver1, 1, -3.5
*Equation
2
MasterNode4, 3, 1.0, MasterNode1, 3, -1.0
*Equation
3
MasterNode5, 1, 1.0, MasterNode1, 1, -1.0, ConstraintsDriver4, 1, -0.44
*Equation
3
MasterNode5, 2, 1.0, MasterNode1, 2, -1.0, ConstraintsDriver5, 1, -0.44
*Equation
3
MasterNode5, 3, 1.0, MasterNode1, 3, -1.0, ConstraintsDriver2, 1, -0.44
*Equation
4
MasterNode6, 1, 1.0, MasterNode1, 1, -1.0, ConstraintsDriver4, 1, -0.44, ConstraintsDriver0, 1, -3.5
*Equation
3
MasterNode6, 2, 1.0, MasterNode1, 2, -1.0, ConstraintsDriver5, 1, -0.44
*Equation
3
MasterNode6, 3, 1.0, MasterNode1, 3, -1.0, ConstraintsDriver2, 1, -0.44
*Equation
5
MasterNode7, 1, 1.0, MasterNode1, 1, -1.0, ConstraintsDriver0, 1, -3.5, ConstraintsDriver4, 1, -0.44,
ConstraintsDriver3, 1, -3.5
*Equation
4
MasterNode7, 2, 1.0, MasterNode1, 2, -1.0, ConstraintsDriver1, 1, -3.5, ConstraintsDriver5, 1, -0.44
*Equation
3
MasterNode7, 3, 1.0, MasterNode1, 3, -1.0, ConstraintsDriver2, 1, -0.44
*Equation
4
MasterNode8, 1, 1.0, MasterNode1, 1, -1.0, ConstraintsDriver3, 1, -3.5, ConstraintsDriver4, 1, -0.44
*Equation
4
MasterNode8, 2, 1.0, MasterNode1, 2, -1.0, ConstraintsDriver1, 1, -3.5, ConstraintsDriver5, 1, -0.44
*Equation
3
MasterNode8, 3, 1.0, MasterNode1, 3, -1.0, ConstraintsDriver2, 1, -0.44
*******************
*** CREATE STEP ***
*******************
*** PREDEFINED FIELDS ***
*** Name: Initial temperature 0ºC all cells   Type: Temperature ***
*Material, Name=PATCH_ISO
*Elastic
100000, 0.3
*Expansion
5e-06,
*Solid Section, ElSet=Matrix, Material=PATCH_ISO
1.0,
*Solid Section, ElSet=Yarn0, Material=PATCH_ISO
1.0,
*Solid Section, ElSet=Yarn1, Material=PATCH_ISO
1.0,
*Solid Section, ElSet=Yarn2, Material=PATCH_ISO
1.0,
*Solid Section, ElSet=Yarn3, Material=PATCH_ISO
1.0,
*Initial Conditions, type=TEMPERATURE
AllNodes, 0.
*Step, Name=PATCH_eps11, nlgeom=NO
unit macro strain eps11, the other five held at zero
*Static
1.0, 1.0, 1e-6, 1.0
*Boundary, op=NEW
MasterNode1, 1, 3
ConstraintsDriver0, 1, 1, 1.00000000e-03
ConstraintsDriver1, 1, 1, 0.00000000e+00
ConstraintsDriver2, 1, 1, 0.00000000e+00
ConstraintsDriver3, 1, 1, 0.00000000e+00
ConstraintsDriver4, 1, 1, 0.00000000e+00
ConstraintsDriver5, 1, 1, 0.00000000e+00
*Output, field
*Element Output, directions=YES
S, E
*Output, history, frequency=1
*Node Output, nset=ConstraintsDriver0
U, RF
*Node Output, nset=ConstraintsDriver1
U, RF
*Node Output, nset=ConstraintsDriver2
U, RF
*Node Output, nset=ConstraintsDriver3
U, RF
*Node Output, nset=ConstraintsDriver4
U, RF
*Node Output, nset=ConstraintsDriver5
U, RF
*End Step
*Step, Name=PATCH_eps22, nlgeom=NO
unit macro strain eps22, the other five held at zero
*Static
1.0, 1.0, 1e-6, 1.0
*Boundary, op=NEW
MasterNode1, 1, 3
ConstraintsDriver0, 1, 1, 0.00000000e+00
ConstraintsDriver1, 1, 1, 1.00000000e-03
ConstraintsDriver2, 1, 1, 0.00000000e+00
ConstraintsDriver3, 1, 1, 0.00000000e+00
ConstraintsDriver4, 1, 1, 0.00000000e+00
ConstraintsDriver5, 1, 1, 0.00000000e+00
*Output, field
*Element Output, directions=YES
S, E
*Output, history, frequency=1
*Node Output, nset=ConstraintsDriver0
U, RF
*Node Output, nset=ConstraintsDriver1
U, RF
*Node Output, nset=ConstraintsDriver2
U, RF
*Node Output, nset=ConstraintsDriver3
U, RF
*Node Output, nset=ConstraintsDriver4
U, RF
*Node Output, nset=ConstraintsDriver5
U, RF
*End Step
*Step, Name=PATCH_eps33, nlgeom=NO
unit macro strain eps33, the other five held at zero
*Static
1.0, 1.0, 1e-6, 1.0
*Boundary, op=NEW
MasterNode1, 1, 3
ConstraintsDriver0, 1, 1, 0.00000000e+00
ConstraintsDriver1, 1, 1, 0.00000000e+00
ConstraintsDriver2, 1, 1, 1.00000000e-03
ConstraintsDriver3, 1, 1, 0.00000000e+00
ConstraintsDriver4, 1, 1, 0.00000000e+00
ConstraintsDriver5, 1, 1, 0.00000000e+00
*Output, field
*Element Output, directions=YES
S, E
*Output, history, frequency=1
*Node Output, nset=ConstraintsDriver0
U, RF
*Node Output, nset=ConstraintsDriver1
U, RF
*Node Output, nset=ConstraintsDriver2
U, RF
*Node Output, nset=ConstraintsDriver3
U, RF
*Node Output, nset=ConstraintsDriver4
U, RF
*Node Output, nset=ConstraintsDriver5
U, RF
*End Step
*Step, Name=PATCH_gam12, nlgeom=NO
unit macro strain gam12, the other five held at zero
*Static
1.0, 1.0, 1e-6, 1.0
*Boundary, op=NEW
MasterNode1, 1, 3
ConstraintsDriver0, 1, 1, 0.00000000e+00
ConstraintsDriver1, 1, 1, 0.00000000e+00
ConstraintsDriver2, 1, 1, 0.00000000e+00
ConstraintsDriver3, 1, 1, 1.00000000e-03
ConstraintsDriver4, 1, 1, 0.00000000e+00
ConstraintsDriver5, 1, 1, 0.00000000e+00
*Output, field
*Element Output, directions=YES
S, E
*Output, history, frequency=1
*Node Output, nset=ConstraintsDriver0
U, RF
*Node Output, nset=ConstraintsDriver1
U, RF
*Node Output, nset=ConstraintsDriver2
U, RF
*Node Output, nset=ConstraintsDriver3
U, RF
*Node Output, nset=ConstraintsDriver4
U, RF
*Node Output, nset=ConstraintsDriver5
U, RF
*End Step
*Step, Name=PATCH_gam13, nlgeom=NO
unit macro strain gam13, the other five held at zero
*Static
1.0, 1.0, 1e-6, 1.0
*Boundary, op=NEW
MasterNode1, 1, 3
ConstraintsDriver0, 1, 1, 0.00000000e+00
ConstraintsDriver1, 1, 1, 0.00000000e+00
ConstraintsDriver2, 1, 1, 0.00000000e+00
ConstraintsDriver3, 1, 1, 0.00000000e+00
ConstraintsDriver4, 1, 1, 1.00000000e-03
ConstraintsDriver5, 1, 1, 0.00000000e+00
*Output, field
*Element Output, directions=YES
S, E
*Output, history, frequency=1
*Node Output, nset=ConstraintsDriver0
U, RF
*Node Output, nset=ConstraintsDriver1
U, RF
*Node Output, nset=ConstraintsDriver2
U, RF
*Node Output, nset=ConstraintsDriver3
U, RF
*Node Output, nset=ConstraintsDriver4
U, RF
*Node Output, nset=ConstraintsDriver5
U, RF
*End Step
*Step, Name=PATCH_gam23, nlgeom=NO
unit macro strain gam23, the other five held at zero
*Static
1.0, 1.0, 1e-6, 1.0
*Boundary, op=NEW
MasterNode1, 1, 3
ConstraintsDriver0, 1, 1, 0.00000000e+00
ConstraintsDriver1, 1, 1, 0.00000000e+00
ConstraintsDriver2, 1, 1, 0.00000000e+00
ConstraintsDriver3, 1, 1, 0.00000000e+00
ConstraintsDriver4, 1, 1, 0.00000000e+00
ConstraintsDriver5, 1, 1, 1.00000000e-03
*Output, field
*Element Output, directions=YES
S, E
*Output, history, frequency=1
*Node Output, nset=ConstraintsDriver0
U, RF
*Node Output, nset=ConstraintsDriver1
U, RF
*Node Output, nset=ConstraintsDriver2
U, RF
*Node Output, nset=ConstraintsDriver3
U, RF
*Node Output, nset=ConstraintsDriver4
U, RF
*Node Output, nset=ConstraintsDriver5
U, RF
*End Step
*Step, Name=PATCH_thermal_free, nlgeom=NO
uniform heating with every driver free -- stress must be zero
*Static
1.0, 1.0, 1e-6, 1.0
*Boundary, op=NEW
MasterNode1, 1, 3
*Temperature
AllNodes, 100.
*Output, field
*Element Output, directions=YES
S, E
*Output, history, frequency=1
*Node Output, nset=ConstraintsDriver0
U, RF
*Node Output, nset=ConstraintsDriver1
U, RF
*Node Output, nset=ConstraintsDriver2
U, RF
*Node Output, nset=ConstraintsDriver3
U, RF
*Node Output, nset=ConstraintsDriver4
U, RF
*Node Output, nset=ConstraintsDriver5
U, RF
*End Step
